*Heading
KoFEM CHEXA8 Cantilever Beam 10x2x2
** 99 nodes, 40 C3D8R elements
** Steel 100x100 mm cross-section, L=1 m
** Fixed left face (x=0), Fy=-10 kN on right face (x=1)
** Analytical tip deflection: delta = PL^3/(3EI) = -1.587e-4 m  (I=h^4/12)
**
*Node
  1, 0.000000, 0.000000, 0.000000
  2, 0.000000, 0.000000, 0.050000
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**
*Element, type=C3D8R, elset=AllElements
  1,  1, 10, 13,  4,  2, 11, 14,  5
  2,  2, 11, 14,  5,  3, 12, 15,  6
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**
*Nset, Nset=FixedFace
  1, 2, 3, 4, 5, 6, 7, 8, 9
*Nset, Nset=LoadFace
  91, 92, 93, 94, 95, 96, 97, 98, 99
**
*Material, name=Steel
*Elastic
** E (Pa), nu
  210000000000.0, 0.3
*Density
** rho (kg/m^3)
  7850.0,
**
*Solid Section, elset=AllElements, material=Steel
,
**
** Fix Ux, Uy, Uz on left face (DOF 1-3 in Abaqus = 0-2 in KoFEM)
*Boundary
  FixedFace, 1, 3
**
*Step, name=Step-1, nlgeom=NO
*Static
**
** Total Fy = -10000 N distributed over 9 nodes (-1111.111... N each)
*Cload
  91, 2, -1111.111111111111
  92, 2, -1111.111111111111
  93, 2, -1111.111111111111
  94, 2, -1111.111111111111
  95, 2, -1111.111111111111
  96, 2, -1111.111111111111
  97, 2, -1111.111111111111
  98, 2, -1111.111111111111
  99, 2, -1111.111111111111
**
*End Step
